#===========================================================
# VARIABLES
#===========================================================
variable        data_name      	index    	sys.data
variable        settings_name  	index    	sys.settings
variable 	temperature 	equal 		310
variable 	pressure 	equal 		1
variable 	randomSeed 	equal 		16000

#===========================================================
# GENERAL PROCEDURES
#===========================================================
units       real
dimension   3
boundary    p p p
atom_style  full

#===========================================================
# FORCE FIELD DEFINITION
#===========================================================
pair_style  	  hybrid/overlay wf/cut 25.0 coul/debye 0.126 0.0
bond_style  	  harmonic
dielectric  	  80.0
special_bonds 	  fene
neighbor          3.5 multi
neigh_modify  	  every 10 delay 0
comm_style    	  tiled

#===========================================================
# SETUP SYSTEM
#===========================================================
read_data  	${data_name}

include         ${settings_name}

#===========================================================
# RUN PARAMETERS
#===========================================================
# TIME
timestep      	20
velocity        all create ${temperature} ${randomSeed}

#===========================================================
# OUTPUTS
#===========================================================
# THERMO
thermo        10000
thermo_style  custom step pe press ke temp lx ly lz pzz  spcpu  density
thermo_modify flush yes

# COORDINATES
dump          1 all custom 10000 result_X_CONTROL_0uM_Step_1.lammpstrj id mol type q xu yu zu
dump_modify   1 sort id

# RESTART
restart 1000000 sim_X_CONTROL_0uM.restart

# GROUP
group	protein type <= 20
group	rna type 21 22 23 24
group	sg type <= 24
group	sm type > 24

# CLUSTERING SG
compute       cluster sg cluster/atom 20.0
compute       cmol sg chunk/atom molecule
compute	      reduce sg reduce/chunk cmol min c_cluster
compute       spread sg chunk/spread/atom cmol c_reduce
compute       llps sg chunk/atom c_spread compress yes
compute       rad sg gyration/chunk llps tensor
compute	      radgyr sg gyration/chunk llps
compute	      ccom sg com/chunk llps
compute       prop sg property/chunk llps count

fix           fxrg sg ave/time 200000 1 200000 c_radgyr c_prop file llps_rg_X_CONTROL_0uM_Step_1.out mode vector
fix           fxcom sg ave/time 200000 1 200000 c_ccom[*] file llps_com_X_CONTROL_0uM_Step_1.out mode vector

# Viscosity
compute       stress all stress/atom NULL
compute       msd all displace/atom
dump          stress_msd all custom 100000 stress_msd_X_CONTROL_0uM_Step_1.out id type x y z mol c_stress[*] c_msd[*]
dump_modify   stress_msd sort id

# Diffusivity
compute       molmsd all chunk/atom molecule
compute       mmsd all msd/chunk molmsd
compute	      commsd all com/chunk molmsd
fix           fxmsd all ave/time 100000 1 100000 c_mmsd[*] c_commsd[*] file msd_X_CONTROL_0uM_Step_1.out mode vector

#===========================================================
# RUN SIMULATION
#===========================================================
# NVE
print "Equilibrate" append print.statements
fix             fxnve   	all nve/limit 0.1
fix             fxmom           all momentum 10000 linear 1 1 1 angular
fix             fxCOM           all recenter 300.0 300.0 300.0
fix             fxBal           all balance 100000 1.05 shift xyz 1 1.05
run 100000
unfix fxnve
unfix fxCOM

# NVT
print "PRODUCTION RUN NVT" append print.statements
fix             fxnvt           all nvt temp ${temperature} ${temperature} 100.00
run 3900000
